// COMSOL Multiphysics 5.2.1.262 model "evaporation_porous_media_small_rate.mph"
// Evaporation in Porous Media with Small Evaporation Rate
// modeldescr_heat/evaporation_porous_media_small_rate
// This tutorial describes laminar air flow through a humid porous medium. The air is dry at the inlet and its moisture content increases as air flows through the porous medium. It is assumed that the initial amount of liquid water in the porous medium is large enough and that the evaporation rate is small enough so that the liquid water is never fully evaporated. In addition, the evaporation rate is small enough to neglect the induced property changes in the porous medium.
// Outline of the model tree

Parameters
  p0 = 1[atm]  // Ambient pressure
  T0 = 20[degC]  // Ambient temperature
  u0 = 0.1[m/s]  // Free stream velocity
  D_wa = 2.6e-5[m^2/s]  // Water-air diffusivity
  M_w = 0.018[kg/mol]  // Molar mass of water
  H_vap = 2.454e6[J/kg]*M_w  // Heat of vaporization
  K_evap = 1000[1/s]  // Evaporation rate
  a_w = 0.9  // Water activity

Variables
  var1 "Variables 1"
    c_sat = ht.fluid1.fpsat(T)/(R_const*T)  // Saturation vapor concentration
    m_evap = K_evap*(a_w*c_sat-c)  // Evaporated mass of water vapor

Geometry
  geom1 "Geometry 1" (2D, length unit cm)
    r1: Rectangle | size = {30, 10}
    r2: Rectangle | pos = {6, 0}; size = {8, 1}
    fil1: Fillet | point = r2(1) entities 3, 4; radius = 0.25
    fin: Finalize "Form Union"

Materials
  mat1: Common "Porous Matrix" on domains 2
    def "Basic"
      thermalconductivity = 0.21
      density = 1528
      heatcapacity = 1650
      porosity = 0.4
      hydraulicpermeability = 1e-13

Physics
  ht: HeatTransferInFluids on all domains
    dependent variable T
    PhysicalModelProperty.HeatTransferInPorousMedia = 1
    AmbientSettings.T_amb = T0
    fluid1: FluidHeatTransferModel "Fluid 1" (default)
      fluidType = moistAir
      InputType = concentration
      minput_pressure_src = root.comp1.spf.pA
      minput_velocity_src = root.comp1.u
      minput_concentration_src = root.comp1.c
    init1: init "Initial Values 1" (default)
    ins1: ThermalInsulation (default)
    porous1: PorousHeatTransferModel "Porous Medium 1" on domains 2
      fluidType = moistAir
      InputType = concentration
      theta_p = 0.2
      minput_pressure_src = root.comp1.spf.pA
      minput_velocity_src = root.comp1.u
      minput_concentration_src = root.comp1.c
    temp1: TemperatureBoundary "Temperature 1" on boundaries 1 | T0_src = root.comp1.ht.T_amb
    ofl1: ConvectiveOutflow "Outflow 1" on boundaries 9
    hs1: HeatSource on domains 2 | Q0 = -H_vap*m_evap
  tds: DilutedSpecies "Transport of Diluted Species" on all domains
    dependent variable c
    cdm1: ConvectionDiffusionMigration "Transport Properties 1" (default) | u_src = root.comp1.u; D_c = D_wa
    nflx1: NoFlux (default)
    init1: init "Initial Values 1" (default)
    conc1: Concentration on boundaries 1 | species = 1
    out1: Outflow on boundaries 9
    init2: init "Initial Values 2" on domains 2 | initc = ht.porous1.fpsat(T0)/(R_const*T0)
    reac1: Reactions on domains 2 | R_c = m_evap
    pmtp1: PorousMediaTransportProperties on domains 2
      DF_c = D_wa
      FluidDiffusivityModelType = BruggemanModel
      minput_velocity_src = root.comp1.u
  spf: LaminarFlow on all domains
    dependent variable u = {u, v, w}
    PhysicalModelProperty.EnablePorousMediaDomains = 1
    fp1: FluidProperties (default) | rho_mat = userdef; rho = ht.rho; mu_mat = root.comp1.ht.mu_moist
    init1: init "Initial Values 1" (default)
    wall1: Wall (default)
    fmp1: FluidAndMatrixProperties on domains 2 | rho_mat = userdef; rho = ht.rho; mu_mat = root.comp1.ht.mu_moist
    inl1: InletBoundary "Inlet 1" on boundaries 1 | BoundaryCondition = LaminarInflow; Uav = u0; Lentr = 30
    out1: OutletBoundary "Outlet 1" on boundaries 9

Mesh
  mesh1 "Mesh 1"
    size: MeshSizeDefault | hmax = 2.01; hmin = 0.009; hcurve = 0.3; hnarrow = 1; hgrad = 1.3; hauto = 5
    ftri1: FreeTri "Free Triangular 1" on remaining entities
      size1: Size on domains 1 | table = cfd; hauto = 3
      size2: Size on domains 2 | table = cfd; hauto = 2
    bl1: BndLayer "Boundary Layers 1" on all domains
      blp: BndLayerProp "Boundary Layer Properties" on boundaries 2-4, 6-8, 10, 11 | blnlayers = 5; blhminfact = 2

Studies
  std1 "Study 1"
    stat: Stationary | physselection = ht; solve for = {spf}
    time: Transient "Time Dependent" | tlist = range(0,1,60)

Solver configurations
  sol1 "Solution 1" (study std1)
    v1: Variables "Dependent Variables 1"
    s1: Stationary "Stationary Solver 1"
      fc1: FullyCoupled | linsolver = d1; dtech = auto; initstep = 0.01; minstep = 1.0E-6; maxiter = 100
      d1: Direct | linsolver = pardiso
    su1: StoreSolution
    v2: Variables "Dependent Variables 2" | initmethod = sol; notsolmethod = sol
    t1: Time "Time-Dependent Solver 1"
      tlist = range(0,1,60)
      atolglobalmethod = scaled
      atolglobal = 5.0E-4
      maxorder = 2
      estrat = exclude
      fc1: FullyCoupled | linsolver = d1; maxiter = 8; damp = 0.9; jtech = once
      d1: Direct | linsolver = pardiso
  sol2 "Solution Store 1" (study std1)

Datasets
  dset1: Solution | solution = sol1
  dset2: Solution | solution = sol2

Plots
  pg1: PlotGroup2D "Temperature (ht)" | data = dset1
    surf1: Surface | expr = T
  pg2: PlotGroup2D "Isothermal Contours (ht)" | data = dset1
    con1: Contour | expr = T
  pg3: PlotGroup2D "Concentration (tds)" | data = dset1
    surf1: Surface | expr = c
  pg4: PlotGroup2D "Velocity (spf)" | data = dset1
    surf1: Surface | expr = spf.U; differential = on
  pg5: PlotGroup2D "Pressure (spf)" | data = dset1
    con1: Contour | expr = p; differential = on